# Формула Бернули
n := 10000
m := 5
p := 0.9999
q := 1 - p = 0.0001
C(n, m) := n!/((n - m)!*m!)
P := C(n, m)*p^m*q^(n - m) simplify →  # error: Число слишком велико.
sum(C(n, m)*p^m*q^(n - m), m = 9998 .. 10000) → 0.919707800758
# Формула Пуассона
n := 10000
m := 5
p := 0.0001
q := 1 - p = 0.9999
λ := n*p = 1
P := λ^m*e^(-λ)/m! = 0.00306566
# Локальная формула Муавра-Лапласса
n := 400
m := 180
p := 0.5
q := 1 - p = 0.5
f(x) := 1/sqrt(2*π)*e^(-x^2/2)
P := f((m - n*p)/sqrt(n*p*q))/sqrt(n*p*q) = 0.0053991
# Интегральная формула Муавра-Лапласса
n := 400
p := 0.5
q := 1 - p = 0.5
a := 180
b := 400
x1 := (a - n*p)/sqrt(n*p*q) = -2
x2 := (b - n*p)/sqrt(n*p*q) = 20
F(x) := 2/sqrt(2*π)*integral(e^(-t^2/2), t = 0 .. x)
P := 1/2*(F(x2) - F(x1)) = 0.97725
